;; ==========================================================================
;; 1CMT_SIGMOID_DUR_LIN
;;   Sigmoid absorption with duration
;;   Linear elimination
;; --------------------------------------------------------------------------
;; Structure
;;   Dose --(zero-order, D1)--> [Depot] --Ka--> [Central (V)] --CL-->
;;
;; Data set / dosing requirements
;;   One dose record per administration: CMT=1 (depot), RATE=-2
;;   (duration D1 modelled in $PK).  Zero-order input INTO the depot
;;   followed by first-order transfer to central gives the sigmoid
;;   (S-shaped) plasma profile.
;;
;; Solver: closed-form (analytical)
;; ==========================================================================

$PROBLEM 1CMT sigmoid_dur | Linear elimination

$INPUT   ID TIME AMT RATE DV EVID MDV CMT ADDL II WT
$DATA    ../data/pkdata.csv IGNORE=@

$SUBROUTINES ADVAN2 TRANS2

; compartment 1 = depot
; compartment 2 = central (observation)
; compartment 3 = output

$PK
; ---- typical values and between-subject variability ------------------
  CL    = THETA(1)*EXP(ETA(1))
  V     = THETA(2)*EXP(ETA(2))
  KA    = THETA(3)*EXP(ETA(3))
  D1    = THETA(4)*EXP(ETA(4))

; ---- random effects exported to $TABLE --------------------------------
  ET1   = ETA(1)
  ET2   = ETA(2)
  ET3   = ETA(3)
  ET4   = ETA(4)

; ---- scaling (concentration = amount / volume) ------------------------
  S2 = V

$ERROR
  IPRED = F
  IF(IPRED.LE.0) IPRED = 1.0E-10
  Y     = IPRED + IPRED*EPS(1) + EPS(2)   ; combined prop. + add. error
  IRES  = DV - IPRED
  IWRES = IRES/IPRED

; ---- residual error variances exported to $TABLE ----------------------
  SG1   = SIGMA(1,1)          ; proportional
  SG2   = SIGMA(2,2)          ; additive

; ---- initial estimates -------------------------------------------------
$THETA  (0, 5.0)             ; 1 CL     clearance (L/h)
$THETA  (0, 50.0)            ; 2 V      central volume (L)
$THETA  (0, 1.0)             ; 3 KA     absorption rate constant (1/h)
$THETA  (0, 2.0)             ; 4 D1     zero-order duration into cmt 1 (h)

$OMEGA  0.09             ; 1 IIV CL
$OMEGA  0.09             ; 2 IIV V
$OMEGA  0.09             ; 3 IIV KA
$OMEGA  0 FIX            ; 4 IIV D1    (free to estimate if supported)

$SIGMA  0.04             ; 1 proportional residual error (CV ~20%)
$SIGMA  0.01             ; 2 additive residual error (variance)

$ESTIMATION METHOD=1 INTER MAXEVAL=9999 NSIG=3 SIGL=9 PRINT=5 NOABORT POSTHOC
$COVARIANCE PRINT=E UNCONDITIONAL

$TABLE   ID TIME AMT RATE EVID MDV CMT DV IPRED IRES IWRES CWRES PRED
         RES WRES ET1 ET2 ET3 ET4 SG1 SG2
         ONEHEADER NOPRINT FILE=1cmt_sigmoid_dur_lin.tab
$TABLE   ID CL V KA D1 ET1 ET2 ET3 ET4
         FIRSTONLY ONEHEADER NOPRINT FILE=1cmt_sigmoid_dur_lin.par

;; ----------------------------------------------------------------------
;; SIMULATION BLOCK
;; To simulate instead of estimate: comment out $ESTIMATION and
;; $COVARIANCE above, then un-comment the two lines below.
;; ----------------------------------------------------------------------
; $SIMULATION (20260830) (20260831 NORMAL) ONLYSIM SUBPROBLEMS=200
; $TABLE ID TIME AMT RATE EVID MDV CMT DV IPRED
;        NOAPPEND ONEHEADER NOPRINT FILE=1cmt_sigmoid_dur_lin_sim.tab
