;; ==========================================================================
;; TMDD_1CMT_FULL_SCLAG
;; Target-mediated drug disposition - 1-compartment model
;;   Form : Full TMDD
;;   Input: Subcutaneous, first-order absorption with lag time
;; --------------------------------------------------------------------------
;; Structure
;;   Dose --> [SC depot] --KA--> [Plasma (V)]
;;   [Plasma (V)] --CL--> eliminated
;;   drug + [Free target (R)] <--KON/KOFF--> [Complex (RC)]
;;   target: KSYN = KDEG*R0 in, KDEG out; complex out via KINT
;;
;; Assumptions
;;   Free drug, free target and complex are all explicit states.
;;   Binding is described by KON / KOFF; the complex is internalised
;;   with KINT.  Target turnover is zero-order synthesis and
;;   first-order degradation, with KSYN = KDEG*R0 so that the target
;;   sits at R0 before the first dose (Mager & Jusko 2001).
;;
;; Data set / dosing requirements
;;   Dose records: CMT=1 (SC depot), RATE=0.
;;   Absorption starts at TIME+ALAG1.
;;   Observation records: CMT=2 for BOTH analytes; the FLAG column
;;   selects which one is being observed:
;;     FLAG=1  total drug concentration in plasma (nM)
;;     FLAG=2  total target concentration (nM)
;;
;; UNITS - read this first
;;   Drug and target concentrations MUST be in the SAME molar unit,
;;   because KON*C*R only makes sense that way.  These files assume
;;   nM for concentrations, nmol for AMT, L for volumes and days for
;;   time.  Feeding mg/L drug and nM target into a TMDD model is the
;;   classic silent failure - convert the dose to nmol first.
;;
;; Solver: general non-linear ODE (ADVAN13)
;; ==========================================================================

$PROBLEM TMDD 1cmt full | sclag

$INPUT   ID TIME AMT RATE DV EVID MDV CMT FLAG ADDL II WT
$DATA    ../data/tmdddata.csv IGNORE=@

$SUBROUTINES ADVAN13 TOL=9
$MODEL  NCOMPARTMENTS=4
        COMP=(DEPOT, DEFDOSE)
        COMP=(CENTRAL, DEFOBS)
        COMP=(RECEPT)
        COMP=(COMPLEX)

; compartment 1 = SC depot
; compartment 2 = central drug
; compartment 3 = free target
; compartment 4 = drug-target complex

$PK
; ---- typical values and between-subject variability ------------------
  CL    = THETA(1)*EXP(ETA(1))
  V     = THETA(2)*EXP(ETA(2))
  KON   = THETA(3)*EXP(ETA(3))
  KOFF  = THETA(4)*EXP(ETA(4))
  KINT  = THETA(5)*EXP(ETA(5))
  KDEG  = THETA(6)*EXP(ETA(6))
  R0    = THETA(7)*EXP(ETA(7))
  KA    = THETA(8)*EXP(ETA(8))
  LGTF1 = LOG(THETA(9)/(1-THETA(9))) + ETA(9)
  F1    = EXP(LGTF1)/(1+EXP(LGTF1))
  ALAG1 = THETA(10)*EXP(ETA(10))

; ---- random effects exported to $TABLE --------------------------------
  ET1   = ETA(1)
  ET2   = ETA(2)
  ET3   = ETA(3)
  ET4   = ETA(4)
  ET5   = ETA(5)
  ET6   = ETA(6)
  ET7   = ETA(7)
  ET8   = ETA(8)
  ET9   = ETA(9)
  ET10  = ETA(10)

; ---- pre-dose target baseline ----------------------------------------
;     KSYN = KDEG*R0, so the target starts at steady state R0.
  A_0(3) = R0*V

; ---- scaling (concentration = amount / volume) ------------------------
  S2 = V

$DES
  C    = A(2)/V
  IF(C.LT.0) C = 0
  RF   = A(3)/V
  RC   = A(4)/V
  BIND = KON*C*RF*V - KOFF*RC*V
  DADT(1) = -KA*A(1)
  DADT(2) = KA*A(1) - CL*C - BIND
  DADT(3) =  KDEG*R0*V - KDEG*RF*V - BIND
  DADT(4) =  BIND - KINT*RC*V

$ERROR
  CFR  = A(2)/V
  RFR  = A(3)/V
  RCX  = A(4)/V
  CTOT = CFR + RCX
  RTOT = RFR + RCX
  IF(FLAG.EQ.2) THEN
    IPRED = RTOT                        ; total target
    IF(IPRED.LE.0) IPRED = 1.0E-10
    Y     = IPRED + IPRED*EPS(3) + EPS(4)
  ELSE
    IPRED = CTOT                        ; total drug
    IF(IPRED.LE.0) IPRED = 1.0E-10
    Y     = IPRED + IPRED*EPS(1) + EPS(2)
  ENDIF
  IRES  = DV - IPRED
  IWRES = IRES/IPRED

; ---- residual error variances exported to $TABLE ----------------------
  SG1   = SIGMA(1,1)   ; proportional, analyte 1
  SG2   = SIGMA(2,2)   ; additive, analyte 1
  SG3   = SIGMA(3,3)   ; proportional, analyte 2
  SG4   = SIGMA(4,4)   ; additive, analyte 2

; ---- initial estimates -------------------------------------------------
$THETA  (0, 0.2)             ; 1 CL    clearance (L/day)
$THETA  (0, 3.0)             ; 2 V     central volume (L)
$THETA  (0, 1.0)             ; 3 KON   association rate (1/(nM*day))
$THETA  (0, 0.5)             ; 4 KOFF  dissociation rate (1/day)
$THETA  (0, 0.5)             ; 5 KINT  complex internalisation rate (1/day)
$THETA  (0, 1.0)             ; 6 KDEG  free target degradation rate (1/day)
$THETA  (0, 5.0)             ; 7 R0    baseline total target conc. (nM)
$THETA  (0, 0.25)            ; 8 KA    absorption rate constant (1/day)
$THETA  (0.001, 0.7, 0.999)  ; 9 F1    SC bioavailability (logit-scale IIV)
$THETA  (0, 0.1)             ; 10 ALAG1 absorption lag time (day)

$OMEGA  0.09             ; 1 IIV CL
$OMEGA  0.09             ; 2 IIV V
$OMEGA  0 FIX            ; 3 IIV KON   (free it if the data support it)
$OMEGA  0 FIX            ; 4 IIV KOFF  (free it if the data support it)
$OMEGA  0.09             ; 5 IIV KINT
$OMEGA  0.09             ; 6 IIV KDEG
$OMEGA  0.09             ; 7 IIV R0
$OMEGA  0.09             ; 8 IIV KA
$OMEGA  0 FIX            ; 9 IIV F1    (free it if the data support it)
$OMEGA  0 FIX            ; 10 IIV ALAG1 (free it if the data support it)

$SIGMA  0.04             ; 1 proportional RUV, drug   (FLAG=1)
$SIGMA  0.01             ; 2 additive RUV, drug
$SIGMA  0.04             ; 3 proportional RUV, target (FLAG=2)
$SIGMA  0.01             ; 4 additive RUV, target

$ESTIMATION METHOD=1 INTER MAXEVAL=9999 NSIG=3 SIGL=9 PRINT=5 NOABORT POSTHOC
; TMDD models often need a more robust route to the optimum; a common
; two-step alternative to the FOCE-I line above is:
; $ESTIMATION METHOD=SAEM INTERACTION NBURN=2000 NITER=1000 PRINT=50
; $ESTIMATION METHOD=IMP INTERACTION EONLY=1 NITER=10 ISAMPLE=3000 PRINT=1
$COVARIANCE PRINT=E UNCONDITIONAL

$TABLE   ID TIME AMT RATE EVID MDV CMT FLAG DV IPRED IRES IWRES CWRES
         PRED RES WRES ET1 ET2 ET3 ET4 ET5 ET6 ET7 ET8 ET9 ET10 SG1 SG2
         SG3 SG4
         ONEHEADER NOPRINT FILE=tmdd_1cmt_full_sclag.tab
$TABLE   ID TIME CFR CTOT RFR RCX RTOT
         ONEHEADER NOPRINT FILE=tmdd_1cmt_full_sclag.prof
$TABLE   ID CL V KON KOFF KINT KDEG R0 KA F1 ALAG1 ET1 ET2 ET3 ET4 ET5
         ET6 ET7 ET8 ET9 ET10
         FIRSTONLY ONEHEADER NOPRINT FILE=tmdd_1cmt_full_sclag.par

;; ----------------------------------------------------------------------
;; SIMULATION BLOCK
;; To simulate instead of estimate: comment out $ESTIMATION and
;; $COVARIANCE above, then un-comment the two lines below.
;; ----------------------------------------------------------------------
; $SIMULATION (20260830) (20260831 NORMAL) ONLYSIM SUBPROBLEMS=200
; $TABLE ID TIME AMT RATE EVID MDV CMT FLAG DV IPRED CFR CTOT RFR RCX
;        NOAPPEND ONEHEADER NOPRINT FILE=tmdd_1cmt_full_sclag_sim.tab
