;; ==========================================================================
;; TMDD_1CMT_QE_IV
;; Target-mediated drug disposition - 1-compartment model
;;   Form : Quasi-equilibrium (rapid binding) approximation
;;   Input: IV input (bolus or infusion)
;; --------------------------------------------------------------------------
;; Structure
;;   Dose --(IV)--> [Plasma (V)]
;;   [Plasma (V)] --CL--> eliminated
;;   drug + target in rapid equilibrium (KD) binding; complex cleared by KINT
;;   target: KSYN = KDEG*R0 in, KDEG out
;;
;; Assumptions
;;   Binding is assumed instantaneous relative to every other process,
;;   so C*R/RC = KD = KOFF/KON at all times.  The states become TOTAL
;;   drug and TOTAL target; free drug is recovered from the quadratic
;;   binding equation (Mager & Jusko 2001).
;;
;; Data set / dosing requirements
;;   Dose records: CMT=1 (plasma).
;;   RATE=0 gives an IV bolus; RATE>0 an IV infusion.
;;   Observation records: CMT=1 for BOTH analytes; the FLAG column
;;   selects which one is being observed:
;;     FLAG=1  total drug concentration in plasma (nM)
;;     FLAG=2  total target concentration (nM)
;;
;; UNITS - read this first
;;   Drug and target concentrations MUST be in the SAME molar unit,
;;   because KON*C*R only makes sense that way.  These files assume
;;   nM for concentrations, nmol for AMT, L for volumes and days for
;;   time.  Feeding mg/L drug and nM target into a TMDD model is the
;;   classic silent failure - convert the dose to nmol first.
;;
;; Solver: general non-linear ODE (ADVAN13)
;; ==========================================================================

$PROBLEM TMDD 1cmt qe | iv

$INPUT   ID TIME AMT RATE DV EVID MDV CMT FLAG ADDL II WT
$DATA    ../data/tmdddata.csv IGNORE=@

$SUBROUTINES ADVAN13 TOL=9
$MODEL  NCOMPARTMENTS=2
        COMP=(CENTRAL, DEFDOSE, DEFOBS)
        COMP=(TARGET)

; compartment 1 = central drug
; compartment 2 = total target

$PK
; ---- typical values and between-subject variability ------------------
  CL    = THETA(1)*EXP(ETA(1))
  V     = THETA(2)*EXP(ETA(2))
  KD    = THETA(3)*EXP(ETA(3))
  KINT  = THETA(4)*EXP(ETA(4))
  KDEG  = THETA(5)*EXP(ETA(5))
  R0    = THETA(6)*EXP(ETA(6))

; ---- random effects exported to $TABLE --------------------------------
  ET1   = ETA(1)
  ET2   = ETA(2)
  ET3   = ETA(3)
  ET4   = ETA(4)
  ET5   = ETA(5)
  ET6   = ETA(6)

; ---- pre-dose target baseline ----------------------------------------
;     KSYN = KDEG*R0, so the target starts at steady state R0.
  A_0(2) = R0*V

; ---- scaling (concentration = amount / volume) ------------------------
  S1 = V

$DES
  CTOT = A(1)/V
  IF(CTOT.LT.0) CTOT = 0
  RTOT = A(2)/V
  BB   = CTOT - RTOT - KD
  CF   = 0.5*(BB + SQRT(BB*BB + 4*KD*CTOT))
  RC   = CTOT - CF
  RF   = RTOT - RC
  DADT(1) = -CL*CF - KINT*RC*V
  DADT(2) =  KDEG*R0*V - KDEG*RF*V - KINT*RC*V

$ERROR
  CTOT = A(1)/V
  IF(CTOT.LT.0) CTOT = 0
  RTOT = A(2)/V
  BB   = CTOT - RTOT - KD
  CFR  = 0.5*(BB + SQRT(BB*BB + 4*KD*CTOT))
  RCX  = CTOT - CFR
  RFR  = RTOT - RCX
  IF(FLAG.EQ.2) THEN
    IPRED = RTOT                        ; total target
    IF(IPRED.LE.0) IPRED = 1.0E-10
    Y     = IPRED + IPRED*EPS(3) + EPS(4)
  ELSE
    IPRED = CTOT                        ; total drug
    IF(IPRED.LE.0) IPRED = 1.0E-10
    Y     = IPRED + IPRED*EPS(1) + EPS(2)
  ENDIF
  IRES  = DV - IPRED
  IWRES = IRES/IPRED

; ---- residual error variances exported to $TABLE ----------------------
  SG1   = SIGMA(1,1)   ; proportional, analyte 1
  SG2   = SIGMA(2,2)   ; additive, analyte 1
  SG3   = SIGMA(3,3)   ; proportional, analyte 2
  SG4   = SIGMA(4,4)   ; additive, analyte 2

; ---- initial estimates -------------------------------------------------
$THETA  (0, 0.2)             ; 1 CL    clearance (L/day)
$THETA  (0, 3.0)             ; 2 V     central volume (L)
$THETA  (0, 0.5)             ; 3 KD    equilibrium dissoc. constant (nM)
$THETA  (0, 0.5)             ; 4 KINT  complex internalisation rate (1/day)
$THETA  (0, 1.0)             ; 5 KDEG  free target degradation rate (1/day)
$THETA  (0, 5.0)             ; 6 R0    baseline total target conc. (nM)

$OMEGA  0.09             ; 1 IIV CL
$OMEGA  0.09             ; 2 IIV V
$OMEGA  0 FIX            ; 3 IIV KD    (free it if the data support it)
$OMEGA  0.09             ; 4 IIV KINT
$OMEGA  0.09             ; 5 IIV KDEG
$OMEGA  0.09             ; 6 IIV R0

$SIGMA  0.04             ; 1 proportional RUV, drug   (FLAG=1)
$SIGMA  0.01             ; 2 additive RUV, drug
$SIGMA  0.04             ; 3 proportional RUV, target (FLAG=2)
$SIGMA  0.01             ; 4 additive RUV, target

$ESTIMATION METHOD=1 INTER MAXEVAL=9999 NSIG=3 SIGL=9 PRINT=5 NOABORT POSTHOC
; TMDD models often need a more robust route to the optimum; a common
; two-step alternative to the FOCE-I line above is:
; $ESTIMATION METHOD=SAEM INTERACTION NBURN=2000 NITER=1000 PRINT=50
; $ESTIMATION METHOD=IMP INTERACTION EONLY=1 NITER=10 ISAMPLE=3000 PRINT=1
$COVARIANCE PRINT=E UNCONDITIONAL

$TABLE   ID TIME AMT RATE EVID MDV CMT FLAG DV IPRED IRES IWRES CWRES
         PRED RES WRES ET1 ET2 ET3 ET4 ET5 ET6 SG1 SG2 SG3 SG4
         ONEHEADER NOPRINT FILE=tmdd_1cmt_qe_iv.tab
$TABLE   ID TIME CFR CTOT RFR RCX RTOT
         ONEHEADER NOPRINT FILE=tmdd_1cmt_qe_iv.prof
$TABLE   ID CL V KD KINT KDEG R0 ET1 ET2 ET3 ET4 ET5 ET6
         FIRSTONLY ONEHEADER NOPRINT FILE=tmdd_1cmt_qe_iv.par

;; ----------------------------------------------------------------------
;; SIMULATION BLOCK
;; To simulate instead of estimate: comment out $ESTIMATION and
;; $COVARIANCE above, then un-comment the two lines below.
;; ----------------------------------------------------------------------
; $SIMULATION (20260830) (20260831 NORMAL) ONLYSIM SUBPROBLEMS=200
; $TABLE ID TIME AMT RATE EVID MDV CMT FLAG DV IPRED CFR CTOT RFR RCX
;        NOAPPEND ONEHEADER NOPRINT FILE=tmdd_1cmt_qe_iv_sim.tab
